*Heading
** Job name: Cube_h2 Model name: Cube
** Generated by: Abaqus/CAE 6.13-1
*Preprint, echo=NO, model=NO, history=NO, contact=NO
**
** PARTS
**
*Part, name=Part-2
*Node
      1,          -5.,          -5.,          10.
      2,          -5.,          -3.,          10.
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*Element, type=C3D8
  1,  37,  38,  44,  43,   1,   2,   8,   7
  2,  38,  39,  45,  44,   2,   3,   9,   8
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*Nset, nset=Body, generate
   1,  216,    1
*Elset, elset=Body, generate
   1,  125,    1
** Section: Section-2
*Solid Section, elset=Body, material=HyperElastic
,
*End Part
**
**
** ASSEMBLY
**
*Assembly, name=Assembly
**
*Instance, name=Part-2-1, part=Part-2
*End Instance
**
*Nset, nset=Bot, instance=Part-2-1
  31,  32,  33,  34,  35,  36
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*Elset, elset=Bot, instance=Part-2-1
  21,  22,  23,  24,  25,  46
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*Nset, nset=Lft, instance=Part-2-1, generate
   1,  211,    6
*Elset, elset=Lft, instance=Part-2-1, generate
   1,  121,    5
*Nset, nset=Top, instance=Part-2-1
   1,   2,   3,   4,   5,   6
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*Elset, elset=Top, instance=Part-2-1
   1,   2,   3,   4,   5,  26
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*Nset, nset=bck, instance=Part-2-1, generate
  1,  36,   1
*Elset, elset=bck, instance=Part-2-1, generate
  1,  25,   1
*Elset, elset=_Top_S3, internal, instance=Part-2-1
   1,   2,   3,   4,   5,  26
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*Surface, type=ELEMENT, name=Top
_Top_S3, S3
*End Assembly
**
** MATERIALS
**
*Material, name=Elastic
*Elastic
2000., 0.3
*Material, name=HyperElastic
*Hyperelastic, neo hooke
 2.08333, 0.36
** ----------------------------------------------------------------
**
** STEP: Step-1
**
*Step, name=Step-1, nlgeom=YES
*Static, direct
0.2, 1.,
**
** BOUNDARY CONDITIONS
**
** Name: Bottom Type: Symmetry/Antisymmetry/Encastre
*Boundary
Bot, ENCASTRE
**
** LOADS
**
** Name: Fcos   Type: Surface traction
*Dsload, follower=NO, constant resultant=YES
Top, TRVEC, 5., 0., 0., 1.
**
** OUTPUT REQUESTS
**
*Restart, write, frequency=0
**
** FIELD OUTPUT: F-Output-1
**
*Output, field
*Node Output
CF, RF, U, UR, UT
*Element Output, directions=YES
LE, PE, PEEQ, PEMAG, S
**
** HISTORY OUTPUT: H-Output-1
**
*Output, history, variable=PRESELECT
*End Step
